# OpenSim document version 30000
Model Lower Limb 2009 Arnold et al v2S:
  credits: Arnold, E.M., Ward, S.R., Lieber, R. L., and Delp, S.L.
  length_units: meters
  force_units: N
  gravity: 0 -9.80665 0
  publications:
    Arnold, E.M., Ward, S.R., Lieber, R. L., and Delp, S.L., A model of the lower limb for analysis of human movement, Annals of Biomedical Engineering, 2009, DOI: 10.1007/s10439-009-9852-5 DETAILED COMMENTS AND REFERENCES FOR USE WITH THE 7 SEGMENT KINEMATIC MODEL OF THE LOWER LIMB CREATED BY EDITH M. ARNOLD: Arnoldetal2009OneLeg_v2S.osim Changes from Arnoldetal2009OneLeg.osim: 05/07/10: Updated to OpenSimDocument Version 20001 05/07/10: Added alternate tendon slack length to semimem. 0.348 is representative of the experimental joint angle-fiber length relationship, but results in unrealistic passive forces at high hip flexion. This value may be more appropriate depending on the application 0.378 is gives more realistic passive behavior in high hip flexion angles, but fibers become very short in less extreme positions. This is default value included in the paper of reference. Comment out the one you don't want to use. 05/07/10: Changed all muscles from Delp1990 to Schutte1993. This file contains three options for muscle models: Thelen2003Muscle Schutte1993Muscle Delp1990Muscle This musculoskeletal model uses the Schutte1993Muscle The definition of each muscle contains a list of coordinates that describe its line of action and the parameters (peak isometric force, optimal fiber length, tendon slack length, and pennation angle) needed to compute isometric muscle force. Additional parameters can be added to create a dynamics-based muscle model. The joint definitions describe the kinematics of a 7 segment, 7 degree-of-freedom model of the pelvis, femur, patella, tibia, calcaneus, talus, and toes. The model is a right leg. The model represents a nominal adult male, and is based on the lower limb models developed by Delp et al. (1990) and A.S. Arnold (1999). It includes the following modifications, relative to the Delp et al. model: 1. Expanded architecture data This architecture of these muscles is based on a study of 21 cadavers by Ward et al. (2009), an improvement over the data by Wickiewicz (1983) Friederich and Brand (1990)which included only 5 total. 2. Fiber length-joint angle relationship Ward et al. explicitly linked measured fiber lengths to joint angles. This allows examination of the fiber length operating range in relation to joint angle. 3. Experimentally based tendon lengths In the Delp model tendon lengths were set so that resultant passive moments matched experimental results. In this model they were set using an experimentally measured relationship between fiber length and joint angle. 4. Longer plantarflexor fibers In the Delp model the fiber lengths of soleus and the gastrocnemii were lengthened beyond the data reported by Wickiewicz et al. This was necessary to achieve physiolgically reasonable results. The plantarflexor fiber lengths measured by Ward et al. were longer and thus lengthening was not necessary. 5. Walker knee In this model, 3D tibiofemoral kinematics are based on experimental data published by Walker et al. (1988) and adapted from a SIMM model by A.S. Arnold et al. (2000) Knee flexion is positive and full extension is 0 degrees. Walker, P. S., J. S. Rovick, and D. D. Robertson. The effects of knee brace hinge design and placement on joint mechanics. J. Biomech. 21:965-974, 1988. 6. Altered wrapping and attachment points Wrapping surfaces were added and some attachment points were modified to refine muscle paths and moment arms. Additions are a combination of surfaces adapted from A.S. Arnold et al. (2000) and new surfaces. 7. Right and left hemipelves and sacrum were re-oriented. Adapted from A.S. Arnold et al. (2000) In this model, spatial relationships between the hemipelves and sacrum are more consistent with pelves constructed from MR images. 8. Femur was re-digitized. Adapted from A.S. Arnold et al. (2000) The femur from Delp's model (Specimen A55, Stanford University) was digitized at higher resolution. 9. Tibia was replaced. Adapted from A.S. Arnold et al. (2000) The tibia in Delp's model did not match the Specimen A55 femur. The tibia from Specimen A55 was digitized and used in place of the tibia in Delp's model. 10. Fibula was scaled by 97% and re-oriented. Adapted from A.S. Arnold et al. (2000) 11. Pelvis coordinate system was revised. Adapted from A.S. Arnold et al. (2000) In this model, the "neutral position" was defined such that the ASISs and pubic tubercle lie in the frontal plane. In Delp's model, the "neutral position" was defined to be coincident with the anatomical position. This difference corresponds to an offset in pelvic tilt and hip flexion angle of about 5 degrees. This may also differ from a gait lab convention and care should be taken to ensure appropriate interpretations according to the convention used. JOURNAL ARTICLE REFERENCES The model of the lower limb is defined as an input file for OpenSim. An overview of this software and its input file structure is given in: Delp SL, Anderson FC, Arnold AS, Loan P, Habib A, John CT, Guendelman E, Thelen DG. OpenSim: Open-source Software to Create and Analyze Dynamic Simulations of Movement. IEEE Transactions on Biomedical Engineering 54(11):1940-50, 2007. The details of the lower limb model are described in the follow publications: Arnold, E.M., Ward, S.R., Lieber, R. L., and Delp, S.L., A model of the lower limb for analysis of human movement, Annals of Biomedical Engineering, 2009, DOI: 10.1007/s10439-009-9852-5 Arnold, A.S., Asakawa, D.J., and Delp, S.L., Do the hamstrings and adductors contribute to excessive internal rotation of the hip in persons with cerebral palsy? Gait Posture 11:181-90, 2000. Delp, S.L., Loan, J.P., Hoy, M.G., Zajac, F.E., Topp E.L., Rosen, J.M., An interactive graphics-based model of the lower extremity to study orthopaedic surgical procedures, IEEE Transactions on Biomedical Engineering, vol. 37, pp. 757-767, 1990. Delp, Surgery Simulation: A computer graphics system to analyze and design musculoskeletal reconstructions of the lower extremity, Ph.D. Dissertation, Stanford University, 1990. Ward, S. R., Eng, C.M., Smallwood, L.H., Lieber, R.L.: Are Current Measurements of Lower Extremity Muscle Architecture Accurate? Clin Orthop Relat Res 467:1074-82, 2009. Additional information on the model of the lower limb can be obtained by contacting Scott L. Delp. Bioengineering Department, Stanford University, Clark Center, Room S321 Stanford, California 94305 http://www.stanford.edu/group/nmbl/ Additional information on the musculoskeletal modeling software (OpenSim) can be obtained from simtk.org at https://simtk.org/home/opensim The muscle model used with the lower limb model is described in the following publications: Zajac, Muscle and tendon: Properties, models, scaling, and application to biomechanics and motor control, in CRC reviews in biomedical engineering vol.17, issue 4, pp. 359-411, 1989. Delp, S.L. and Loan, J.P.: A software system to develop and analyze models of musculoskeletal structures, Computers in Biology and Medicine, vol. 25, pp. 21-34, 1995. Buchanan and Lloyd Passive Curve Schutte LM Passive Curve REFERENCES FOR THE MUSCLE-TENDON PARAMETERS References are given for each musculotendon parameter in Table 1 of Arnold, E.M., Ward, S.R., Lieber, R. L., and Delp, S.L., A model of the lower limb for analysis of human movement, Annals of Biomedical Engineering, 2009, DOI: 10.1007/s10439-009-9852-5 LOCATION OF REFERENCE FRAMES Each musculotendon path is defined as series of three-dimensional coordinates. Each coordinate is fixed in a body-segmental reference frame. In the anatomical position, the X-axes point anteriorly, the Y-axes point superiorly, and the Z-axes point laterally. The location of these frames is as follows. PELVIS: The pelvic reference frame is fixed at the midpoint of the line connecting the two ASIS. FEMUR: The femoral frame is fixed at the center of the femoral head TIBIA: The tibial segment is located at the midpoint of the line between the medial and lateral femoral epicondyles. PATELLA: The patellar frame is located at the most distal point of the patella. TALUS: The talar frame is located at the midpoint of the line between the apeces of the medial and lateral maleoli. CALCANUS: The calcaneal frame is located at the most distal, inferior point on the posterior surface of the calcaneus. TOES: The toe frame is located at the base of the second metatarsal Walker et al. used a different convention for the femur and tibia frame when describing the knee joint. In the anatomical position the X-axis points medially (left), Y-axis points superiorly, Z-axis points anteriorly. These frames are translated to the FEMUR and TIBIA frame via fixed joints. FEMUR_WLKR: Located at the midpoint of the line between the medial and lateral femoral epicondyles. TIBIA_WLKR: Coincident with FEMUR_WLKR at knee_angle = 0 SHAFT_AXIS: A fixed reference frame oriented along the line of the femur shaft used to simplify the placement of wrapping surfaces during model development.
  BodySet:
    Body ground: mass=0 mass_center=(0 0 0) inertia_xx=0 inertia_yy=0 inertia_zz=0
    Body pelvis: mass=11.777 mass_center=(-0.0707 0 0) inertia_xx=0.1028 inertia_yy=0.0871 inertia_zz=0.0579
        meshes=(pelvis.vtp pelvflip.vtp sacrum.vtp)
      WeldJoint base: parent_body=ground location_in_parent=(0 0 0) location=(0 0 0)
      WrapEllipsoid PS_at_brim: translation=(-0.0798 -0.0654 0.0656) quadrant=all dimensions=(0.052 0.0492 0.071)
      WrapEllipsoid IL_at_brim: translation=(-0.0685 -0.0557 0.0756) quadrant=all dimensions=(0.0549 0.0665 0.071)
      WrapEllipsoid Gmax_at_pelvis: xyz_body_rotation=(-0.637045 0.383623 -0.684867)
          translation=(-0.0795 -0.0825 0.0665) quadrant=all dimensions=(0.04 0.04 0.06)
    Body femur: mass=9.3014 mass_center=(0 -0.17 0) inertia_xx=0.1339 inertia_yy=0.0351 inertia_zz=0.1412
        meshes=femur.vtp
      CustomJoint hip: parent_body=pelvis location_in_parent=(-0.056276 -0.07849 0.07726) location=(0 0 0)
        Coordinate hip_flexion: motion_type=rotational default_value=0 range=(-0.3490659 0.7854) clamped=true
        Coordinate hip_adduction: motion_type=rotational default_value=0 range=(-0.3490659 0.3490659) clamped=true
        Coordinate hip_rotation: motion_type=rotational default_value=0 range=(-0.3490659 0.3490659) clamped=true
        SpatialTransform: axes_held_at_zero=(translation1 translation2 translation3)
          TransformAxis rotation1: coordinates=hip_flexion axis=(0 0 1) LinearFunction(coefficients=1 0)
          TransformAxis rotation2: coordinates=hip_adduction axis=(1 0 0) LinearFunction(coefficients=1 0)
          TransformAxis rotation3: coordinates=hip_rotation axis=(0 1 0) LinearFunction(coefficients=1 0)
      WrapEllipsoid Gastroc_at_Condyles: xyz_body_rotation=(0.0589921 -0.0937242 0.0232129)
          translation=(0.0048 -0.4075 0.0003) quadrant=all dimensions=(0.03 0.025 0.05)
    Body femur_wlkr: mass=0 mass_center=(0 0 0) inertia_xx=0 inertia_yy=0 inertia_zz=0
      WeldJoint femur_coord: parent_body=femur location_in_parent=(-0.00809 -0.40796 -0.00275)
          orientation_in_parent=(-1.641568 1.446181 1.570796) location=(0 0 0)
    Body tibia_wlkr: mass=0 mass_center=(0 0 0) inertia_xx=0 inertia_yy=0 inertia_zz=0
      CustomJoint walker_knee: parent_body=femur_wlkr location_in_parent=(0 0 0) location=(0 0 0)
        Coordinate knee_angle: motion_type=rotational default_value=3.078e-5 range=(0 1.745329) clamped=true
            locked=true
        SpatialTransform: axes_held_at_zero=translation3
          TransformAxis rotation1: coordinates=knee_angle axis=(1 0 0) LinearFunction(coefficients=1 0)
          TransformAxis rotation2: coordinates=knee_angle axis=(0 0 1)
            SimmSpline: x=(0 0.174533 0.349066 0.523599 0.698132 0.872665 1.0472 1.22173 1.39626 1.5708 1.74533 1.91986 2.0944)
                y=(0 0.0126809 0.0226969 0.0296054 0.0332049 0.0335354 0.0308779 0.0257548 0.0189295 0.011407 0.00443314 -0.00050475 -0.0016782)
          TransformAxis rotation3: coordinates=knee_angle axis=(0 1 0)
            SimmSpline: x=(0 0.174533 0.349066 0.523599 0.698132 0.872665 1.0472 1.22173 1.39626 1.5708 1.74533 1.91986 2.0944)
                y=(0 0.059461 0.109399 0.150618 0.18392 0.210107 0.229983 0.24435 0.254012 0.25977 0.262428 0.262788 0.261654)
          TransformAxis translation1: coordinates=knee_angle axis=(0 1 0)
            SimmSpline: x=(0 0.174533 0.349066 0.523599 0.698132 0.872665 1.0472 1.22173 1.39626 1.5708 1.74533 1.91986 2.0944)
                y=(0 0.000479 0.000835 0.001086 0.001251 0.001346 0.001391 0.001403 0.0014 0.0014 0.001421 0.001481 0.001599)
          TransformAxis translation2: coordinates=knee_angle axis=(0 0 1)
            SimmSpline: x=(0 0.174533 0.349066 0.523599 0.698132 0.872665 1.0472 1.22173 1.39626 1.5708 1.74533 1.91986 2.0944)
                y=(0 0.000988 0.001899 0.002734 0.003492 0.004173 0.004777 0.005305 0.005756 0.00613 0.006427 0.006648 0.006792)
    Body tibia: mass=3.7075 mass_center=(0 -0.1867 0) inertia_xx=0.0504 inertia_yy=0.0051 inertia_zz=0.0511
        meshes=(tibia.vtp fibula.vtp)
      WeldJoint tibia_coord: parent_body=tibia_wlkr location_in_parent=(-0.001731 0.002389 0.008452)
          orientation_in_parent=(1.695412 -1.500024 1.570796) location=(0 0 0)
      WrapEllipsoid GR_at_condyles: xyz_body_rotation=(0 0 -0.18326) translation=(0 0 0) quadrant=all
          dimensions=(0.036 0.0635 0.0533)
      WrapEllipsoid SM_at_condyles: xyz_body_rotation=(0 0 -0.296706) translation=(0 0 0) quadrant=all
          dimensions=(0.0352 0.0602 0.0489)
      WrapEllipsoid ST_at_condyles: xyz_body_rotation=(0 0 -0.270526) translation=(0 0 0) quadrant=all
          dimensions=(0.0425 0.069 0.0572)
      WrapEllipsoid BFLH_at_gastroc: xyz_body_rotation=(0 0 0.270526) translation=(-0.0619 -0.05 0.0007) quadrant=y
          dimensions=(0.0335 0.02 0.0833)
      WrapCylinder Gastroc_at_Shank: xyz_body_rotation=(2.96723 0.0289725 -1.47812)
          translation=(-0.0074 -0.074 -0.0033) quadrant=-y radius=0.055 length=0.1
    Body shaft_axis: mass=0 mass_center=(0 0 0) inertia_xx=0 inertia_yy=0 inertia_zz=0
      WeldJoint femoral_shaft: parent_body=femur location_in_parent=(-0.01527 -0.03442 0.03475)
          orientation_in_parent=(0.1117011 0 0.03665191) location=(0 0 0)
      WrapEllipsoid AB_at_femshaft: xyz_body_rotation=(0 0 0.139626) translation=(0.0268 -0.0843 0) quadrant=all
          dimensions=(0.0165 0.07 0.021)
      WrapEllipsoid AL_at_femshaft: xyz_body_rotation=(0 0 0.0174533) translation=(0.0386 -0.2064 0) quadrant=all
          dimensions=(0.0201 0.1 0.018)
      WrapEllipsoid AMprox_at_femshaft: xyz_body_rotation=(0 0 0.174533) translation=(0.0197 -0.0442 0) quadrant=all
          dimensions=(0.0211 0.07 0.032)
      WrapEllipsoid AMmid_at_femshaft: xyz_body_rotation=(0 0 0.0872665) translation=(0.0336 -0.1284 0) quadrant=all
          dimensions=(0.0214 0.12 0.031)
      WrapEllipsoid AMdist_at_femshaft: xyz_body_rotation=(0 0 0.139626) translation=(0.0376 -0.2293 0) quadrant=all
          dimensions=(0.0218 0.2 0.0215)
      WrapEllipsoid AMisch_at_condyles: xyz_body_rotation=(0 0 -0.471239) translation=(-0.026 -0.344 0) quadrant=all
          dimensions=(0.05 0.24 0.0402)
      WrapEllipsoid PECT_at_femshaft: xyz_body_rotation=(0 0 0.174533) translation=(0.021 -0.052 0) quadrant=all
          dimensions=(0.0166 0.05 0.0131)
      WrapCylinder KnExt_at_fem: xyz_body_rotation=(-0.172089 0.0570723 -0.92869) translation=(0.0053 -0.3701 0.0086)
          quadrant=all radius=0.025 length=0.1
    Body patella: mass=0 mass_center=(0 0 0) inertia_xx=0 inertia_yy=0 inertia_zz=0 meshes=pat.vtp
      CustomJoint patellofemoral: parent_body=femur location_in_parent=(0 0 0) location=(0 0 0)
        Coordinate patellofemoral_r3: motion_type=rotational default_value=0.00113686 range=(-99999.9 99999.9)
            clamped=false
        Coordinate patellofemoral_tx: motion_type=translational default_value=0.04435 range=(-99999.9 99999.9)
            clamped=false
        Coordinate patellofemoral_ty: motion_type=translational default_value=-0.418712 range=(-99999.9 99999.9)
            clamped=false
        SpatialTransform: axes_held_at_zero=(rotation2 rotation3 translation3)
          TransformAxis rotation1: coordinates=patellofemoral_r3 axis=(0 0 1) LinearFunction(coefficients=1 0)
          TransformAxis translation1: coordinates=patellofemoral_tx axis=(1 0 0) LinearFunction(coefficients=1 0)
          TransformAxis translation2: coordinates=patellofemoral_ty axis=(0 1 0) LinearFunction(coefficients=1 0)
    Body talus: mass=0.1 mass_center=(0 0 0) inertia_xx=0.001 inertia_yy=0.001 inertia_zz=0.001 meshes=talus.vtp
      CustomJoint ankle: parent_body=tibia location_in_parent=(-0.01 -0.4 0) location=(0 0 0)
        Coordinate ankle_angle: motion_type=rotational default_value=-1.08337e-9 range=(-0.5235988 0.3490659)
            clamped=true locked=true
        SpatialTransform: axes_held_at_zero=(rotation2 rotation3 translation1 translation2 translation3)
          TransformAxis rotation1: coordinates=ankle_angle axis=(-0.105014 -0.1740221 0.9791263)
              LinearFunction(coefficients=1 0)
    Body calcn: mass=1.25 mass_center=(0.1 0.03 0) inertia_xx=0.0014 inertia_yy=0.0039 inertia_zz=0.0041
        meshes=foot.vtp
      CustomJoint subtalar: parent_body=talus location_in_parent=(-0.04877 -0.04195 0.00792) location=(0 0 0)
        Coordinate subtalar_angle: motion_type=rotational default_value=0 range=(-0.3490659 0.3490659) clamped=true
            locked=true
        SpatialTransform: axes_held_at_zero=(rotation2 rotation3 translation1 translation2 translation3)
          TransformAxis rotation1: coordinates=subtalar_angle axis=(0.78718 0.604747 -0.120949)
              LinearFunction(coefficients=1 0)
    Body toes: mass=0.2166 mass_center=(0.0346 0.006 -0.0175) inertia_xx=0.0001 inertia_yy=0.0002 inertia_zz=0.001
        meshes=bofoot.vtp
      CustomJoint mtp: parent_body=calcn location_in_parent=(0.1788 -0.002 0.00108) location=(0 0 0)
        Coordinate mtp_angle: motion_type=rotational default_value=0 range=(-0.5235988 0.5235988) clamped=true
            locked=true
        SpatialTransform: axes_held_at_zero=(rotation2 rotation3 translation1 translation2 translation3)
          TransformAxis rotation1: coordinates=mtp_angle axis=(0.5809542 0 -0.8139363) LinearFunction(coefficients=1 0)
  ConstraintSet:
    CoordinateCouplerConstraint patellofemoral_r3_con: independent_coordinate_names=knee_angle
        dependent_coordinate_name=patellofemoral_r3 scale_factor=1
      coupled_coordinates_function: SimmSpline f11: x=(0 0.174533 0.349066 0.523599 0.698132 0.872665 1.0472 1.22173 1.39626 1.5708 1.74533 1.91986 2.0944)
          y=(0.00113686 -0.00629212 -0.105582 -0.253683 -0.414245 -0.579047 -0.747244 -0.91799 -1.09044 -1.26379 -1.43763 -1.61186 -1.78634)
    CoordinateCouplerConstraint patellofemoral_tx_con: independent_coordinate_names=knee_angle
        dependent_coordinate_name=patellofemoral_tx scale_factor=1
      coupled_coordinates_function: SimmSpline f9: x=(0 0.174533 0.349066 0.523599 0.698132 0.872665 1.0472 1.22173 1.39626 1.5708 1.74533 1.91986 2.0944)
          y=(0.04435 0.040692 0.035581 0.029012 0.021473 0.013523 0.005483 -0.002412 -0.009959 -0.016903 -0.022926 -0.027739 -0.030815)
    CoordinateCouplerConstraint patellofemoral_ty_con: independent_coordinate_names=knee_angle
        dependent_coordinate_name=patellofemoral_ty scale_factor=1
      coupled_coordinates_function: SimmSpline f10: x=(0 0.174533 0.349066 0.523599 0.698132 0.872665 1.0472 1.22173 1.39626 1.5708 1.74533 1.91986 2.0944)
          y=(-0.418712 -0.426965 -0.43422 -0.440152 -0.444617 -0.447495 -0.448724 -0.448337 -0.446353 -0.442826 -0.438035 -0.432448 -0.426632)
  ForceSet:
    Schutte1993Muscle_Deprecated [values shared by the 27 below unless stated]: max_contraction_velocity=10
        time_scale=0.1 activation1=0 activation2=0
    Schutte1993Muscle_Deprecated add_brev_r: max_isometric_force=303.7 optimal_fiber_length=0.1031
        tendon_slack_length=0.036 pennation_angle_at_optimal=0.1064651 [radians]
      PathPoint addbrev-P1: pelvis (-0.0191 -0.094 0.0154)
      PathPoint addbrev-P2: femur (-0.002 -0.118 0.0249)
      PathWrap: wrap_object=AB_at_femshaft method=hybrid
      # Function representing force-length behavior of tendon
    Schutte1993Muscle_Deprecated add_long_r: max_isometric_force=399.5 optimal_fiber_length=0.1082
        tendon_slack_length=0.13 pennation_angle_at_optimal=0.1235693
      PathPoint addlong-P1: pelvis (-0.00758 -0.0889 0.01888)
      PathPoint addlong-P2: femur (0.01126 -0.23937 0.01583)
      PathWrap: wrap_object=AL_at_femshaft method=hybrid
      # Function representing force-length behavior of tendon
    Schutte1993Muscle_Deprecated add_mag1_r: max_isometric_force=324.2 optimal_fiber_length=0.1377
        tendon_slack_length=0.048 pennation_angle_at_optimal=0.2567379
      PathPoint addmagMid-P1: pelvis (-0.05266 -0.12075 0.02854)
      PathPoint addmagMid-P2: femur (0.00242 -0.1624 0.02922)
      PathWrap: wrap_object=AMmid_at_femshaft method=hybrid
      # Function representing force-length behavior of tendon
    Schutte1993Muscle_Deprecated add_mag2_r: max_isometric_force=324.2 optimal_fiber_length=0.1772
        tendon_slack_length=0.09 pennation_angle_at_optimal=0.2412045
      PathPoint addmagDist-P1: pelvis (-0.07404 -0.12767 0.03982)
      PathPoint addmagDist-P2: femur (0.01125 -0.2625 0.0193)
      PathWrap: wrap_object=AMdist_at_femshaft method=hybrid
      # Function representing force-length behavior of tendon
    Schutte1993Muscle_Deprecated add_mag3_r: max_isometric_force=324.2 optimal_fiber_length=0.1562
        tendon_slack_length=0.221 pennation_angle_at_optimal=0.2073451
      PathPoint addmagIsch-P1: pelvis (-0.08962 -0.12976 0.04171)
      PathPoint addmagIsch-P2: femur (0.00481 -0.38797 -0.03273)
      PathWrap: wrap_object=AMisch_at_condyles method=hybrid
      # Function representing force-length behavior of tendon
    Schutte1993Muscle_Deprecated bifemlh_r: max_isometric_force=705.2 optimal_fiber_length=0.0976
        tendon_slack_length=0.322 pennation_angle_at_optimal=0.2021091
      PathPoint bflh-P1: pelvis (-0.104 -0.1191 0.0586)
      PathPoint bflh-P2: tibia (-0.0317 -0.0425 0.0333)
      PathWrap: wrap_object=BFLH_at_gastroc method=midpoint
      # Function representing force-length behavior of tendon
    Schutte1993Muscle_Deprecated gem_r: max_isometric_force=109 optimal_fiber_length=0.024 tendon_slack_length=0.039
        pennation_angle_at_optimal=0
      PathPoint gem-P1: pelvis (-0.10357 -0.0764 0.06707)
      PathPoint gem-P2: femur (-0.0142 -0.0033 0.0443)
      # Function representing force-length behavior of tendon
    Schutte1993Muscle_Deprecated glut_max1_r: max_isometric_force=546.1 optimal_fiber_length=0.1473
        tendon_slack_length=0.05 pennation_angle_at_optimal=0.3829252
      PathPoint glmax1-P1: pelvis (-0.1231 0.0345 0.0563)
      PathPoint glmax1-P2: pelvis (-0.1257 -0.0242 0.0779)
      PathPoint glmax1-P3: femur (-0.0444 -0.0326 0.0302)
      PathPoint glmax1-P4: femur (-0.0277 -0.0566 0.047)
      PathWrap: wrap_object=Gmax_at_pelvis method=hybrid
      # Function representing force-length behavior of tendon
    Schutte1993Muscle_Deprecated glut_max2_r: max_isometric_force=780.5 optimal_fiber_length=0.1569
        tendon_slack_length=0.0733 pennation_angle_at_optimal=0.3829252
      PathPoint glmax2-P1: pelvis (-0.1317 0.0087 0.0462)
      PathPoint glmax2-P2: pelvis (-0.1344 -0.0609 0.0813)
      PathPoint glmax2-P3: femur (-0.045 -0.0584 0.0252)
      PathPoint glmax2-P4: femur (-0.0156 -0.1016 0.0419)
      PathWrap: wrap_object=Gmax_at_pelvis method=hybrid
      # Function representing force-length behavior of tendon
    Schutte1993Muscle_Deprecated glut_max3_r: max_isometric_force=526.1 optimal_fiber_length=0.1665
        tendon_slack_length=0.0702 pennation_angle_at_optimal=0.3829252
      PathPoint glmax3-P1: pelvis (-0.13 -0.0525 0.009)
      PathPoint glmax3-P2: pelvis (-0.1273 -0.1263 0.0435)
      PathPoint glmax3-P3: femur (-0.0281 -0.1125 0.0094)
      PathPoint glmax3-P4: femur (-0.006 -0.1419 0.0411)
      PathWrap: wrap_object=Gmax_at_pelvis method=hybrid
      # Function representing force-length behavior of tendon
    Schutte1993Muscle_Deprecated glut_med1_r: max_isometric_force=881.1 optimal_fiber_length=0.0733
        tendon_slack_length=0.0565 pennation_angle_at_optimal=0.3572689
      PathPoint glmed1-P1: pelvis (-0.0445 0.0245 0.1172)
      PathPoint glmed1-P2: femur (-0.0218 -0.0117 0.0555)
      # Function representing force-length behavior of tendon
    Schutte1993Muscle_Deprecated glut_med2_r: max_isometric_force=616.5 optimal_fiber_length=0.0733
        tendon_slack_length=0.066 pennation_angle_at_optimal=0.3572689
      PathPoint glmed2-P1: pelvis (-0.085 0.0316 0.0675)
      PathPoint glmed2-P2: femur (-0.0258 -0.0058 0.0527)
      # Function representing force-length behavior of tendon
    Schutte1993Muscle_Deprecated glut_med3_r: max_isometric_force=702 optimal_fiber_length=0.0733
        tendon_slack_length=0.046 pennation_angle_at_optimal=0.3572689
      PathPoint glmed3-P1: pelvis (-0.1152 -0.0073 0.0526)
      PathPoint glmed3-P2: femur (-0.0309 -0.0047 0.0518)
      # Function representing force-length behavior of tendon
    Schutte1993Muscle_Deprecated glut_min1_r: max_isometric_force=180 optimal_fiber_length=0.068
        tendon_slack_length=0.016 pennation_angle_at_optimal=0.1745329
      PathPoint glmin1-P1: pelvis (-0.0464 -0.0149 0.1042)
      PathPoint glmin1-P2: femur (-0.0072 -0.0104 0.056)
      # Function representing force-length behavior of tendon
    Schutte1993Muscle_Deprecated glut_min2_r: max_isometric_force=190 optimal_fiber_length=0.056
        tendon_slack_length=0.026 pennation_angle_at_optimal=0
      PathPoint glmin2-P1: pelvis (-0.0616 -0.0142 0.0971)
      PathPoint glmin2-P2: femur (-0.0096 -0.0104 0.056)
      # Function representing force-length behavior of tendon
    Schutte1993Muscle_Deprecated glut_min3_r: max_isometric_force=215 optimal_fiber_length=0.038
        tendon_slack_length=0.051 pennation_angle_at_optimal=0.01745329
      PathPoint glmin3-P1: pelvis (-0.0789 -0.0155 0.0798)
      PathPoint glmin3-P2: femur (-0.0135 -0.0083 0.055)
      # Function representing force-length behavior of tendon
    Schutte1993Muscle_Deprecated grac_r: max_isometric_force=137.3 optimal_fiber_length=0.2278
        tendon_slack_length=0.169 pennation_angle_at_optimal=0.1424189
      PathPoint grac-P1: pelvis (-0.04736 -0.12932 0.02456)
      PathPoint grac-P2: tibia (-0.01842 -0.04755 -0.02961)
      PathPoint grac-P3: tibia (0.00178 -0.06962 -0.01573)
      PathWrap: wrap_object=GR_at_condyles method=midpoint
      # Function representing force-length behavior of tendon
    Schutte1993Muscle_Deprecated iliacus_r: max_isometric_force=621.9 optimal_fiber_length=0.1066
        tendon_slack_length=0.094 pennation_angle_at_optimal=0.2494076
      PathPoint iliacus-P1: pelvis (-0.0605 0.0309 0.0843)
      PathPoint iliacus-P2: pelvis (-0.0135 -0.0557 0.0756)
      PathPoint iliacus-P3: femur (-0.0023 -0.0565 0.0139)
      PathPoint iliacus-P4: femur (-0.0122 -0.0636 0.0196)
      PathWrap: wrap_object=IL_at_brim method=hybrid range=(2 3)
      # Function representing force-length behavior of tendon
    Schutte1993Muscle_Deprecated pect_r: max_isometric_force=177 optimal_fiber_length=0.133 tendon_slack_length=0.001
        pennation_angle_at_optimal=0
      PathPoint pect-P1: pelvis (-0.0232 -0.08325 0.04529)
      PathPoint pect-P2: femur (-0.00797 -0.08518 0.02403)
      PathWrap: wrap_object=PECT_at_femshaft method=hybrid
      # Function representing force-length behavior of tendon
    Schutte1993Muscle_Deprecated piri_r: max_isometric_force=296 optimal_fiber_length=0.026 tendon_slack_length=0.115
        pennation_angle_at_optimal=0.1745329
      PathPoint piri-P1: pelvis (-0.10181 -0.00653 0.01351)
      PathPoint piri-P2: pelvis (-0.10202 -0.03066 0.06092)
      PathPoint piri-P3: femur (-0.0148 -0.0036 0.0437)
      # Function representing force-length behavior of tendon
    Schutte1993Muscle_Deprecated psoas_r: max_isometric_force=479.7 optimal_fiber_length=0.1169
        tendon_slack_length=0.097 pennation_angle_at_optimal=0.1860521
      PathPoint psoas-P1: pelvis (-0.0606 0.0619 0.039)
      PathPoint psoas-P2: pelvis (-0.0205 -0.0654 0.0656)
      PathPoint psoas-P3: femur (-0.0132 -0.0467 0.0046)
      PathPoint psoas-P4: femur (-0.0235 -0.0524 0.0088)
      PathWrap: wrap_object=PS_at_brim method=hybrid range=(2 3)
      # Function representing force-length behavior of tendon
    Schutte1993Muscle_Deprecated quad_fem_r: max_isometric_force=254 optimal_fiber_length=0.054
        tendon_slack_length=0.024 pennation_angle_at_optimal=0
      PathPoint quadfem-P1: pelvis (-0.11192 -0.11473 0.05166)
      PathPoint quadfem-P2: femur (-0.03575 -0.03552 0.03612)
      # Function representing force-length behavior of tendon
    Schutte1993Muscle_Deprecated rect_fem_r: max_isometric_force=848.8 optimal_fiber_length=0.0759
        tendon_slack_length=0.346 pennation_angle_at_optimal=0.2431244
      PathPoint recfem-P1: pelvis (-0.024 -0.0388 0.0933)
      PathPoint recfem-P2: patella (0.01 0.049 0.0007)
      PathPoint recfem-P3: patella (0.0121 0.0437 -0.001)
      PathWrap: wrap_object=KnExt_at_fem method=hybrid
      # Function representing force-length behavior of tendon
    Schutte1993Muscle_Deprecated sar_r: max_isometric_force=113.5 optimal_fiber_length=0.403 tendon_slack_length=0.11
        pennation_angle_at_optimal=0.02321288
      PathPoint sart-P1: pelvis (-0.0195 -0.0156 0.1056)
      PathPoint sart-P2: femur (-0.003 -0.3568 -0.0421)
      PathPoint sart-P3: tibia (-0.0251 -0.0401 -0.0365)
      PathPoint sart-P4: tibia (-0.0159 -0.0599 -0.0264)
      PathPoint sart-P5: tibia (0.0136 -0.081 -0.0026)
      # Function representing force-length behavior of tendon
    Schutte1993Muscle_Deprecated semimem_r: max_isometric_force=1162.7 optimal_fiber_length=0.069
        tendon_slack_length=0.378 pennation_angle_at_optimal=0.2633702
      PathPoint semimem-P1: pelvis (-0.0987 -0.114 0.0614)
      PathPoint semimem-P2: tibia (-0.029 -0.0417 -0.0196)
      PathWrap: wrap_object=SM_at_condyles method=hybrid
      # Function representing force-length behavior of tendon
    Schutte1993Muscle_Deprecated semiten_r: max_isometric_force=301.9 optimal_fiber_length=0.193
        tendon_slack_length=0.245 pennation_angle_at_optimal=0.2244493
      PathPoint semiten-P1: pelvis (-0.1038 -0.1253 0.0515)
      PathPoint semiten-P2: tibia (-0.0312 -0.0508 -0.0229)
      PathPoint semiten-P3: tibia (0.0019 -0.0773 -0.0117)
      PathWrap: wrap_object=ST_at_condyles method=midpoint
      # Function representing force-length behavior of tendon
    Schutte1993Muscle_Deprecated tfl_r: max_isometric_force=155 optimal_fiber_length=0.095 tendon_slack_length=0.45
        pennation_angle_at_optimal=0.05235988
      PathPoint tfl-P1: pelvis (-0.0311 0.0214 0.1241)
      PathPoint tfl-P2: femur (0.0294 -0.0995 0.0597)
      PathPoint tfl-P3: femur (0.0107 -0.405 0.0324)
      PathPoint tfl-P4: tibia (0.0108 -0.041 0.0346)
      # Function representing force-length behavior of tendon
    ObjectGroup hip_add
    ObjectGroup hip_flex
    ObjectGroup hip_ext
    ObjectGroup knee_flex
    ObjectGroup ankle_df
    ObjectGroup everter
    ObjectGroup inverter
    ObjectGroup ankle_pf
    ObjectGroup hip_exrot
    ObjectGroup hip_abd
    ObjectGroup hip_inrot
    ObjectGroup knee_ext
